// COMSOL Multiphysics 5.6.0.401 model "direct2.mph"
// Outline of the model tree

Parameters
  R0 = 5
  d = 1/6
  Rt = 10
  L = max(abs(Rt), R0) * 1.5

Functions
  int1: Interpolation | source = file; filename = D:\Кафедра\Статьи\2024 РАО\matlab\comsol\medium\c.csv; nargs = 2

Geometry
  geom1 "Geometry 1" (2D, length unit m)
    c1: Circle "FullSpace" | r = L
    r1: Rectangle "TomographyArea" | base = center; size = {2*R0, 2*R0}
    pt2: Point "Transmitter" | p = {real(Rt), imag(Rt)}
    fin: Finalize "Form Union"

Materials
  mat1: Common "BackgroundMaterial" on all domains
    def "Basic"
      density = 1
      soundspeed = 1
  mat2: Common "Inhomogeneity" on domains 2
    def "Basic"
      density = 1
      soundspeed = 1+int1(x,y)

Physics
  acpr: PressureAcoustics "Pressure Acoustics, Frequency Domain" on all domains
    dependent variable p
    fpam1: FrequencyPressureAcousticsModel "Pressure Acoustics 1" (default)
    shb1: SoundHard "Sound Hard Boundary (Wall) 1" (default)
    init1: init "Initial Values 1" (default)
    mls1: FrequencyMonopoleLineSource "Monopole Point Source 1" on points 8 | QsperLength = 1; Type = Flow
    cwr1: CylindricalWaveRadiation on boundaries 5-8

Mesh
  mesh1 "Mesh 1"
    size: MeshSizeDefault | hmax = d; hauto = 2
    ftri1: FreeTri "Free Triangular 1" on remaining entities

Studies
  std1 "Study 1"
    freq: Frequency "Frequency Domain" | plist = 1

Solver configurations
  sol1 "Solution 1" (study std1)
    v1: Variables "Dependent Variables 1"
    s1: Stationary "Stationary Solver 1"
      dDef: Direct
      p1: Parametric | pname = freq; plistarr = 1; punit = Hz; pcontinuationmode = no
      fc1: FullyCoupled | linsolver = dDef
  sol2 "Parametric Solutions 1" (study std1)

Datasets
  dset1: Solution | solution = sol1
  dset2: Solution | solution = sol2

Plots
  pg1: PlotGroup2D "Acoustic Pressure (acpr)" | data = dset1
    surf1: Surface | expr = acpr.p_t; descr = Total acoustic pressure field
  pg2: PlotGroup2D "Sound Pressure Level (acpr)" | data = dset1
    surf1: Surface | expr = acpr.Lp